*Heading
** Job name: 5H Model name: Model-1
** Generated by: Abaqus/CAE 6.14-1
*Preprint, echo=NO, model=NO, history=NO, contact=NO
**
** PARTS
**
*Part, name=Beam
*Node
      1, -0.0799999982, -0.00999999978,  0.405000001
      2, -0.0799999982, -0.00898400042,  0.405000001
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*Element, type=C3D8R
  1,  91,  92,  94,  93,   1,   2,   4,   3
  2,  93,  94,  96,  95,   3,   4,   6,   5
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*Nset, nset=Set-1, generate
   1,  900,    1
*Elset, elset=Set-1, generate
   1,  396,    1
*Nset, nset=Output, generate
 372,  386,    2
*Orientation, name=Ori-1
1., 0., 0., 0., 1., 0.
1, 0.
** Section: Beam Section
*Solid Section, elset=Set-1, orientation=Ori-1, stack direction=1, material=Aluminum
,
*End Part
**
*Part, name="PZT Patch"
*Node
      1, -0.0599999987,           0., 0.0759999976
      2, -0.0599999987, 0.000203000003, 0.0759999976
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*Element, type=C3D8E
 1,  19,  20,  22,  21,   1,   2,   4,   3
 2,  21,  22,  24,  23,   3,   4,   6,   5
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*Nset, nset=Set-1, generate
   1,  108,    1
*Elset, elset=Set-1, generate
  1,  40,   1
*Orientation, name=Ori-1
1., 0., 0., 0., 1., 0.
1, 0.
** Section: PZT Section
*Solid Section, elset=Set-1, orientation=Ori-1, material=PZT-5H
,
*End Part
**
**
** ASSEMBLY
**
*Assembly, name=Assembly
**
*Instance, name="PZT Patch-1", part="PZT Patch"
       0.006,    -0.008984,      0.00432
       0.006,    -0.008984,      0.00432,        0.006,     0.991016,      0.00432,          90.
*End Instance
**
*Instance, name=Beam-1, part=Beam
          0.,           0.,           0.
          0.,           0.,           0.,           0.,           1.,           0.,          90.
*End Instance
**
*Nset, nset=Clamped, instance=Beam-1
  89,  90, 179, 180, 269, 270
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*Nset, nset="Epot points", instance="PZT Patch-1", generate
   2,  108,    2
*Nset, nset=cen1, instance="PZT Patch-1", generate
 36,  90,  18
*Nset, nset=cen2, instance="PZT Patch-1", generate
 20,  74,  18
*Nset, nset=lat1, instance="PZT Patch-1"
  18, 108
*Nset, nset=lat2, instance="PZT Patch-1"
  2, 92
*Nset, nset=_PickedSet11, internal, instance=Beam-1
  89,  90, 179, 180, 269, 270
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*Elset, elset=_PickedSet11, internal, instance=Beam-1, generate
  44,  396,   44
*Nset, nset=_PickedSet12, internal, instance="PZT Patch-1", generate
   1,  107,    2
*Elset, elset=_PickedSet12, internal, instance="PZT Patch-1", generate
  1,  40,   1
*Nset, nset=_PickedSet14, internal, instance="PZT Patch-1", generate
   2,  108,    2
*Elset, elset=_PickedSet14, internal, instance="PZT Patch-1", generate
  1,  40,   1
*Elset, elset=_CP-1-Beam-1_S4, internal, instance=Beam-1, generate
   1,  396,    1
*Surface, type=ELEMENT, name=CP-1-Beam-1
_CP-1-Beam-1_S4, S4
*Elset, elset="_CP-1-PZT Patch-1_S6", internal, instance="PZT Patch-1", generate
  1,  40,   1
*Surface, type=ELEMENT, name="CP-1-PZT Patch-1"
"_CP-1-PZT Patch-1_S6", S6
** Constraint: CP-1-PZT Patch-1-Beam-1
*Tie, name="CP-1-PZT Patch-1-Beam-1", adjust=yes, type=NODE TO SURFACE
CP-1-Beam-1, "CP-1-PZT Patch-1"
*End Assembly
**
** MATERIALS
**
*Material, name=Aluminum
*Density
2758.,
*Elastic
 7.2e+10, 0.33
*Material, name=PZT
*Density
7700.,
*Dielectric
 1.65e-08,
*Elastic
 6.9e+10, 0.31
*Piezoelectric, type=E
0.,         0.,         0.,         0.,         0.,         0., -1.709e-10,         0.
 -1.709e-10,         0.,         0.,         0.,         0.,         0.,         0.,         0.
         0.,         0.
*Material, name=PZT-5H
*Density
7500.,
*Dielectric, type=ORTHO
 1.505e-08, 1.301e-08, 1.505e-08
*Elastic, type=ENGINEERING CONSTANTS
 6.061e+10, 4.831e+10, 6.061e+10,     0.512,     0.289,     0.408,   2.3e+10,  2.35e+10
   2.3e+10,
*Piezoelectric, type=E
0.,        0.,        0.,  7.41e-10,        0.,        0., -2.74e-10,  5.93e-10
 -2.74e-10,        0.,        0.,        0.,        0.,        0.,        0.,        0.
        0.,  7.41e-10
**
** BOUNDARY CONDITIONS
**
** Name: Electric Potential BC Type: Electric potential
*Boundary
_PickedSet12, 9, 9
** Name: Fixed End BC Type: Displacement/Rotation
*Boundary
_PickedSet11, 1, 1
_PickedSet11, 2, 2
_PickedSet11, 3, 3
_PickedSet11, 4, 4
_PickedSet11, 5, 5
_PickedSet11, 6, 6
** ----------------------------------------------------------------
**
** STEP: Step-1
**
*Step, name=Step-1, nlgeom=NO
*Static
1., 1., 1e-05, 1.
**
** BOUNDARY CONDITIONS
**
** Name: Applied voltage BC Type: Electric potential
*Boundary
_PickedSet14, 9, 9, 10.
**
** OUTPUT REQUESTS
**
*Restart, write, frequency=0
**
** FIELD OUTPUT: F-Output-1
**
*Output, field, variable=PRESELECT
**
** HISTORY OUTPUT: H-Output-1
**
*Output, history, variable=PRESELECT
*End Step
